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/batch
! ANSYS input file written by Workbench version 2026 R1
! File used for geometry attach: C:\Users\aqm81\Dropbox\Cursos\ANSYS\Pre-loaded Bolted Connections\2 Modeling the Bolt and Preload\WS01BoltedVessel\Bolted vessel_files\dp0\Geom-1\DM\Geom-1.scdoc
/title,Bolted vessel--Static Structural (B4)
/com,--- Data in consistent NMM units. See Solving Units in the help system for more information.
/units,MPA
/prep7
! Turn off shape checking because checks already performed inside WB mesher.
! See help system for more information.
SHPP,OFF,,NOWARN
etcon,set             ! allow ANSYS to choose best KEYOP's for 180x elements, resets any applicable keyopt to MAPDL defaults
/com,*********** Send User Defined Coordinate System(s) ***********
local,12,0,-3.67104079340014e-015,0.,-2.,0.,0.,180.
local,13,0,-3.02295961503818e-015,0.,-2.,0.,0.,0.
csys,0
/com,*********** Nodes for the whole assembly ***********
nblock,3,,109923
(1i9,3e20.9e3)
    82139    -1.155236434E+00    -1.042602224E+01    -5.000000000E-01
    82140    -8.842704950E-01    -1.083155142E+01    -5.000000000E-01
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-1
/com,*********** Nodes for all Remote Points ***********
nblock,3
(1i9,3e20.9e3)
    99931     0.000000000E+00     0.000000000E+00     0.000000000E+00
    99932     0.000000000E+00     0.000000000E+00     0.000000000E+00
    99933     0.000000000E+00     0.000000000E+00     0.000000000E+00
    99934     0.000000000E+00     0.000000000E+00     0.000000000E+00
    99935     0.000000000E+00     0.000000000E+00     0.000000000E+00
    99936     0.000000000E+00     0.000000000E+00     0.000000000E+00
    99937     0.000000000E+00     0.000000000E+00     0.000000000E+00
    99938     0.000000000E+00     0.000000000E+00     0.000000000E+00
-1
/com,*********** Elements for Body 1 'Component1\Solid11' ***********
et,1,187
MAT,1 $ TYPE,1 $ REAL,1 $ SECNUM,1 $ ESYS,0    ! ELEMNODES = 10
eblock,21,COMPACT,,1758
(21i9)
        1     2216     3026     2931     2281    24347    26957    24341    24326    24665    24664
        2      199     2304     2637     3236    13524    24757    13530    13550    24761    26066
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-1
secnum,1    ! reset the section ID to default
et,2,186
keyo,2,2,1          ! set full integration on SOLID186
MAT,1 $ TYPE,2 $ REAL,1 $ SECNUM,1 $ ESYS,0    ! ELEMNODES = 20
eblock,21,COMPACT,,9566
(21i9)
     1759     1366     1368     1459     1461     3460     4023     3931     4112    20444    20452    20847    20445    28210    29420    29421    28211    20446    20453    20849    20856
     1760       60     2152      517      427      188     2917      425      827    11849    15997    15287    11847    13374    15278    15276    13372    11845    24021    15273    15289
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-1
secnum,1    ! reset the section ID to default
/com,*********** Elements for Body 3 'Component2\Solid1' ***********
et,3,186
keyo,3,2,1          ! set full integration on SOLID186
MAT,3 $ TYPE,3 $ REAL,3 $ SECNUM,3 $ ESYS,0    ! ELEMNODES = 20
eblock,21,COMPACT,,4204
(21i9)
    11325    45640    47561    51883    51884    49571    47650    51892    51893    52289    60098    69022    52292    60431    60432    69034    64337    52290    60096    69023    69025
    11326    45640    51884    51883    47561    49604    51727    51728    51525    52292    69022    60098    52289    64404    68758    68368    64403    52291    68759    68761    60097
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-1
secnum,1    ! reset the section ID to default
/com,*********** Elements for Body 4 'Component3\Solid' ***********
et,4,186
keyo,4,2,1          ! set full integration on SOLID186
MAT,4 $ TYPE,4 $ REAL,4 $ SECNUM,4 $ ESYS,0    ! ELEMNODES = 20
eblock,21,COMPACT,,2088
(21i9)
    15529    69503    70109    70108    69599    71248    70642    70643    71152    73060    75732    73554    73058    77584    77583    77587    78559    73061    75737    75734    73555
    15530    69503    69599    70108    70109    71249    71345    71854    71855    73058    73554    75732    73060    78654    78958    80118    78656    73062    73556    75735    75738
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-1
secnum,1    ! reset the section ID to default
/com,*********** Elements for Body 5 'Component11\Solid' ***********
et,5,186
keyo,5,2,1          ! set full integration on SOLID186
MAT,5 $ TYPE,5 $ REAL,5 $ SECNUM,5 $ ESYS,0    ! ELEMNODES = 20
eblock,21,COMPACT,,32
(21i9)
    17617    82169    82192    82193    82172    82178    82198    82197    82171    82302    82358    82312    82300    82330    82366    82310    82307    82301    82359    82361    82306
    17618    82152    82154    82155    82156    82192    82193    82172    82169    82251    82257    82259    82252    82358    82312    82300    82302    82253    82258    82261    82263
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-1
secnum,1    ! reset the section ID to default
/com,*********** Elements for Body 6 'Component11\Solid' ***********
et,6,186
keyo,6,2,1          ! set full integration on SOLID186
MAT,6 $ TYPE,6 $ REAL,6 $ SECNUM,6 $ ESYS,0    ! ELEMNODES = 20
eblock,21,COMPACT,,32
(21i9)
    17649    82403    82420    82419    82411    82410    82437    82434    82412    82518    82571    82547    82517    82545    82603    82551    82543    82516    82575    82572    82546
    17650    82393    82401    82395    82394    82419    82411    82403    82420    82495    82500    82497    82494    82547    82517    82518    82571    82496    82513    82501    82498
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-1
secnum,1    ! reset the section ID to default
/com,*********** Elements for Body 7 'Component11\Solid' ***********
et,7,186
keyo,7,2,1          ! set full integration on SOLID186
MAT,7 $ TYPE,7 $ REAL,7 $ SECNUM,7 $ ESYS,0    ! ELEMNODES = 20
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/com,*********** Elements for Body 8 'Component11\Solid' ***********
et,8,186
keyo,8,2,1          ! set full integration on SOLID186
MAT,8 $ TYPE,8 $ REAL,8 $ SECNUM,8 $ ESYS,0    ! ELEMNODES = 20
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/com,*********** Elements for Body 9 'Component11\Solid' ***********
et,9,186
keyo,9,2,1          ! set full integration on SOLID186
MAT,9 $ TYPE,9 $ REAL,9 $ SECNUM,9 $ ESYS,0    ! ELEMNODES = 20
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/com,*********** Elements for Body 10 'Component11\Solid' ***********
et,10,186
keyo,10,2,1         ! set full integration on SOLID186
MAT,10 $ TYPE,10 $ REAL,10 $ SECNUM,10 $ ESYS,0    ! ELEMNODES = 20
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/com,*********** Elements for Body 11 'Component11\Solid' ***********
et,11,186
keyo,11,2,1         ! set full integration on SOLID186
MAT,11 $ TYPE,11 $ REAL,11 $ SECNUM,11 $ ESYS,0    ! ELEMNODES = 20
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/com,*********** Elements for Body 12 'Component11\Solid' ***********
et,12,186
keyo,12,2,1         ! set full integration on SOLID186
MAT,12 $ TYPE,12 $ REAL,12 $ SECNUM,12 $ ESYS,0    ! ELEMNODES = 20
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/com,*********** Elements for Body 13 'Component12\Solid' ***********
et,13,186
keyo,13,2,1         ! set full integration on SOLID186
MAT,13 $ TYPE,13 $ REAL,13 $ SECNUM,13 $ ESYS,0    ! ELEMNODES = 20
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/com,*********** Elements for Body 14 'Component12\Solid' ***********
et,14,186
keyo,14,2,1         ! set full integration on SOLID186
MAT,14 $ TYPE,14 $ REAL,14 $ SECNUM,14 $ ESYS,0    ! ELEMNODES = 20
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/com,*********** Elements for Body 15 'Component12\Solid' ***********
et,15,186
keyo,15,2,1         ! set full integration on SOLID186
MAT,15 $ TYPE,15 $ REAL,15 $ SECNUM,15 $ ESYS,0    ! ELEMNODES = 20
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/com,*********** Elements for Body 16 'Component12\Solid' ***********
et,16,186
keyo,16,2,1         ! set full integration on SOLID186
MAT,16 $ TYPE,16 $ REAL,16 $ SECNUM,16 $ ESYS,0    ! ELEMNODES = 20
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/com,*********** Elements for Body 17 'Component12\Solid' ***********
et,17,186
keyo,17,2,1         ! set full integration on SOLID186
MAT,17 $ TYPE,17 $ REAL,17 $ SECNUM,17 $ ESYS,0    ! ELEMNODES = 20
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/com,*********** Elements for Body 18 'Component12\Solid' ***********
et,18,186
keyo,18,2,1         ! set full integration on SOLID186
MAT,18 $ TYPE,18 $ REAL,18 $ SECNUM,18 $ ESYS,0    ! ELEMNODES = 20
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/com,*********** Elements for Body 19 'Component12\Solid' ***********
et,19,186
keyo,19,2,1         ! set full integration on SOLID186
MAT,19 $ TYPE,19 $ REAL,19 $ SECNUM,19 $ ESYS,0    ! ELEMNODES = 20
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/com,*********** Elements for Body 20 'Component12\Solid' ***********
et,20,186
keyo,20,2,1         ! set full integration on SOLID186
MAT,20 $ TYPE,20 $ REAL,20 $ SECNUM,20 $ ESYS,0    ! ELEMNODES = 20
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toffst,273.15,      ! Temperature offset from absolute zero
/com,*********** Set Reference Temperature ***********
tref,22.
/com,*********** Send Materials ***********
Temperature = 'TEMP' ! Temperature
MP,DENS,1,7.85e-09,	! tonne mm^-3
MP,ALPX,1,1.2e-05,	! C^-1
MP,C,1,434000000,	! mm^2 s^-2 C^-1
MP,KXX,1,60.5,	! tonne mm s^-3 C^-1
MP,RSVX,1,0.00017,	! ohm mm
MP,EX,1,200000,	! tonne s^-2 mm^-1
MP,NUXY,1,0.3,
MP,MURX,1,10000,

Temperature = 'TEMP' ! Temperature
MP,DENS,3,7.85e-09,	! tonne mm^-3
MP,ALPX,3,1.2e-05,	! C^-1
MP,C,3,434000000,	! mm^2 s^-2 C^-1
MP,KXX,3,60.5,	! tonne mm s^-3 C^-1
MP,RSVX,3,0.00017,	! ohm mm
MP,EX,3,200000,	! tonne s^-2 mm^-1
MP,NUXY,3,0.3,
MP,MURX,3,10000,

MP,DENS,4,2.25e-09,	! tonne mm^-3
MP,EX,4,28269,	! tonne s^-2 mm^-1
MP,NUXY,4,0.17,

Temperature = 'TEMP' ! Temperature
MP,DENS,5,7.85e-09,	! tonne mm^-3
MP,ALPX,5,1.2e-05,	! C^-1
MP,C,5,434000000,	! mm^2 s^-2 C^-1
MP,KXX,5,60.5,	! tonne mm s^-3 C^-1
MP,RSVX,5,0.00017,	! ohm mm
MP,EX,5,200000,	! tonne s^-2 mm^-1
MP,NUXY,5,0.3,
MP,MURX,5,10000,

Temperature = 'TEMP' ! Temperature
MP,DENS,6,7.85e-09,	! tonne mm^-3
MP,ALPX,6,1.2e-05,	! C^-1
MP,C,6,434000000,	! mm^2 s^-2 C^-1
MP,KXX,6,60.5,	! tonne mm s^-3 C^-1
MP,RSVX,6,0.00017,	! ohm mm
MP,EX,6,200000,	! tonne s^-2 mm^-1
MP,NUXY,6,0.3,
MP,MURX,6,10000,

Temperature = 'TEMP' ! Temperature
MP,DENS,7,7.85e-09,	! tonne mm^-3
MP,ALPX,7,1.2e-05,	! C^-1
MP,C,7,434000000,	! mm^2 s^-2 C^-1
MP,KXX,7,60.5,	! tonne mm s^-3 C^-1
MP,RSVX,7,0.00017,	! ohm mm
MP,EX,7,200000,	! tonne s^-2 mm^-1
MP,NUXY,7,0.3,
MP,MURX,7,10000,

Temperature = 'TEMP' ! Temperature
MP,DENS,8,7.85e-09,	! tonne mm^-3
MP,ALPX,8,1.2e-05,	! C^-1
MP,C,8,434000000,	! mm^2 s^-2 C^-1
MP,KXX,8,60.5,	! tonne mm s^-3 C^-1
MP,RSVX,8,0.00017,	! ohm mm
MP,EX,8,200000,	! tonne s^-2 mm^-1
MP,NUXY,8,0.3,
MP,MURX,8,10000,

Temperature = 'TEMP' ! Temperature
MP,DENS,9,7.85e-09,	! tonne mm^-3
MP,ALPX,9,1.2e-05,	! C^-1
MP,C,9,434000000,	! mm^2 s^-2 C^-1
MP,KXX,9,60.5,	! tonne mm s^-3 C^-1
MP,RSVX,9,0.00017,	! ohm mm
MP,EX,9,200000,	! tonne s^-2 mm^-1
MP,NUXY,9,0.3,
MP,MURX,9,10000,

Temperature = 'TEMP' ! Temperature
MP,DENS,10,7.85e-09,	! tonne mm^-3
MP,ALPX,10,1.2e-05,	! C^-1
MP,C,10,434000000,	! mm^2 s^-2 C^-1
MP,KXX,10,60.5,	! tonne mm s^-3 C^-1
MP,RSVX,10,0.00017,	! ohm mm
MP,EX,10,200000,	! tonne s^-2 mm^-1
MP,NUXY,10,0.3,
MP,MURX,10,10000,

Temperature = 'TEMP' ! Temperature
MP,DENS,11,7.85e-09,	! tonne mm^-3
MP,ALPX,11,1.2e-05,	! C^-1
MP,C,11,434000000,	! mm^2 s^-2 C^-1
MP,KXX,11,60.5,	! tonne mm s^-3 C^-1
MP,RSVX,11,0.00017,	! ohm mm
MP,EX,11,200000,	! tonne s^-2 mm^-1
MP,NUXY,11,0.3,
MP,MURX,11,10000,

Temperature = 'TEMP' ! Temperature
MP,DENS,12,7.85e-09,	! tonne mm^-3
MP,ALPX,12,1.2e-05,	! C^-1
MP,C,12,434000000,	! mm^2 s^-2 C^-1
MP,KXX,12,60.5,	! tonne mm s^-3 C^-1
MP,RSVX,12,0.00017,	! ohm mm
MP,EX,12,200000,	! tonne s^-2 mm^-1
MP,NUXY,12,0.3,
MP,MURX,12,10000,

Temperature = 'TEMP' ! Temperature
MP,DENS,13,7.85e-09,	! tonne mm^-3
MP,ALPX,13,1.2e-05,	! C^-1
MP,C,13,434000000,	! mm^2 s^-2 C^-1
MP,KXX,13,60.5,	! tonne mm s^-3 C^-1
MP,RSVX,13,0.00017,	! ohm mm
MP,EX,13,200000,	! tonne s^-2 mm^-1
MP,NUXY,13,0.3,
MP,MURX,13,10000,

Temperature = 'TEMP' ! Temperature
MP,DENS,14,7.85e-09,	! tonne mm^-3
MP,ALPX,14,1.2e-05,	! C^-1
MP,C,14,434000000,	! mm^2 s^-2 C^-1
MP,KXX,14,60.5,	! tonne mm s^-3 C^-1
MP,RSVX,14,0.00017,	! ohm mm
MP,EX,14,200000,	! tonne s^-2 mm^-1
MP,NUXY,14,0.3,
MP,MURX,14,10000,

Temperature = 'TEMP' ! Temperature
MP,DENS,15,7.85e-09,	! tonne mm^-3
MP,ALPX,15,1.2e-05,	! C^-1
MP,C,15,434000000,	! mm^2 s^-2 C^-1
MP,KXX,15,60.5,	! tonne mm s^-3 C^-1
MP,RSVX,15,0.00017,	! ohm mm
MP,EX,15,200000,	! tonne s^-2 mm^-1
MP,NUXY,15,0.3,
MP,MURX,15,10000,

Temperature = 'TEMP' ! Temperature
MP,DENS,16,7.85e-09,	! tonne mm^-3
MP,ALPX,16,1.2e-05,	! C^-1
MP,C,16,434000000,	! mm^2 s^-2 C^-1
MP,KXX,16,60.5,	! tonne mm s^-3 C^-1
MP,RSVX,16,0.00017,	! ohm mm
MP,EX,16,200000,	! tonne s^-2 mm^-1
MP,NUXY,16,0.3,
MP,MURX,16,10000,

Temperature = 'TEMP' ! Temperature
MP,DENS,17,7.85e-09,	! tonne mm^-3
MP,ALPX,17,1.2e-05,	! C^-1
MP,C,17,434000000,	! mm^2 s^-2 C^-1
MP,KXX,17,60.5,	! tonne mm s^-3 C^-1
MP,RSVX,17,0.00017,	! ohm mm
MP,EX,17,200000,	! tonne s^-2 mm^-1
MP,NUXY,17,0.3,
MP,MURX,17,10000,

Temperature = 'TEMP' ! Temperature
MP,DENS,18,7.85e-09,	! tonne mm^-3
MP,ALPX,18,1.2e-05,	! C^-1
MP,C,18,434000000,	! mm^2 s^-2 C^-1
MP,KXX,18,60.5,	! tonne mm s^-3 C^-1
MP,RSVX,18,0.00017,	! ohm mm
MP,EX,18,200000,	! tonne s^-2 mm^-1
MP,NUXY,18,0.3,
MP,MURX,18,10000,

Temperature = 'TEMP' ! Temperature
MP,DENS,19,7.85e-09,	! tonne mm^-3
MP,ALPX,19,1.2e-05,	! C^-1
MP,C,19,434000000,	! mm^2 s^-2 C^-1
MP,KXX,19,60.5,	! tonne mm s^-3 C^-1
MP,RSVX,19,0.00017,	! ohm mm
MP,EX,19,200000,	! tonne s^-2 mm^-1
MP,NUXY,19,0.3,
MP,MURX,19,10000,

Temperature = 'TEMP' ! Temperature
MP,DENS,20,7.85e-09,	! tonne mm^-3
MP,ALPX,20,1.2e-05,	! C^-1
MP,C,20,434000000,	! mm^2 s^-2 C^-1
MP,KXX,20,60.5,	! tonne mm s^-3 C^-1
MP,RSVX,20,0.00017,	! ohm mm
MP,EX,20,200000,	! tonne s^-2 mm^-1
MP,NUXY,20,0.3,
MP,MURX,20,10000,

!************************* Model Summary ********************
! Component1\Solid11,	Structural Steel,	matid,	1
! Component2\Solid1,	Structural Steel,	matid,	3
! Component3\Solid,	Grafito,	matid,	4
! Component11\Solid,	Structural Steel,	matid,	5
! Component11\Solid,	Structural Steel,	matid,	6
! Component11\Solid,	Structural Steel,	matid,	7
! Component11\Solid,	Structural Steel,	matid,	8
! Component11\Solid,	Structural Steel,	matid,	9
! Component11\Solid,	Structural Steel,	matid,	10
! Component11\Solid,	Structural Steel,	matid,	11
! Component11\Solid,	Structural Steel,	matid,	12
! Component12\Solid,	Structural Steel,	matid,	13
! Component12\Solid,	Structural Steel,	matid,	14
! Component12\Solid,	Structural Steel,	matid,	15
! Component12\Solid,	Structural Steel,	matid,	16
! Component12\Solid,	Structural Steel,	matid,	17
! Component12\Solid,	Structural Steel,	matid,	18
! Component12\Solid,	Structural Steel,	matid,	19
! Component12\Solid,	Structural Steel,	matid,	20
!************************* End Model Summary ********************
/com,*********** Create Contact "Frictional - Component2\Solid1 To Component3\Solid" ***********
*set,tid,22
*set,cid,21
r,tid
r,cid
et,tid,170
et,cid,174
MAT,22 $ TYPE,22 $ REAL,22 $ SECNUM,22 $ ESYS,0    ! ELEMNODES = 8
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MAT,21 $ TYPE,21 $ REAL,21 $ SECNUM,21 $ ESYS,0    ! ELEMNODES = 8
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MAT,21 $ TYPE,21 $ REAL,22 $ SECNUM,21 $ ESYS,0    ! ELEMNODES = 8
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MAT,22 $ TYPE,22 $ REAL,21 $ SECNUM,22 $ ESYS,0    ! ELEMNODES = 8
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keyo,cid,8,2               ! auto create asymmetric contact (from Program Controlled setting)
keyo,cid,10,0              ! adjust contact stiffness each NR iteration (from Program Controlled setting)
keyo,cid,12,0              ! standard contact
mp,mu,cid,0.2       ! unitless
keyo,cid,2,0               ! augmented Lagrange (from Program Controlled setting)
keyo,cid,4,0               ! on Gauss point (from Program Controlled setting)
keyo,cid,9,0               ! use real geometry with stepped effects
keyo,cid,7,0               ! No Prediction
rmod,tid,3,1.       ! FKN
rmod,tid,5,0.       ! ICONT
rmod,tid,6,0.       ! PINB
rmod,tid,10,0.      ! CNOF
rmod,tid,12,0.      ! FKT
rmod,tid,36,232     ! WB DSID
rmod,cid,3,1.       ! FKN
rmod,cid,5,0.       ! ICONT
rmod,cid,6,0.       ! PINB
rmod,cid,10,0.      ! CNOF
rmod,cid,12,0.      ! FKT
rmod,cid,36,232     ! WB DSID
/com,*********** Create Contact "Frictional - Component1\Solid11 To Component3\Solid" ***********
*set,tid,24
*set,cid,23
r,tid
r,cid
et,tid,170
et,cid,174
MAT,24 $ TYPE,24 $ REAL,24 $ SECNUM,24 $ ESYS,0    ! ELEMNODES = 8
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MAT,23 $ TYPE,23 $ REAL,23 $ SECNUM,23 $ ESYS,0    ! ELEMNODES = 8
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MAT,23 $ TYPE,23 $ REAL,24 $ SECNUM,23 $ ESYS,0    ! ELEMNODES = 8
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MAT,24 $ TYPE,24 $ REAL,23 $ SECNUM,24 $ ESYS,0    ! ELEMNODES = 8
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keyo,cid,8,2               ! auto create asymmetric contact (from Program Controlled setting)
keyo,cid,10,0              ! adjust contact stiffness each NR iteration (from Program Controlled setting)
keyo,cid,12,0              ! standard contact
mp,mu,cid,0.2       ! unitless
keyo,cid,2,0               ! augmented Lagrange (from Program Controlled setting)
keyo,cid,4,0               ! on Gauss point (from Program Controlled setting)
keyo,cid,9,0               ! use real geometry with stepped effects
keyo,cid,7,0               ! No Prediction
rmod,tid,3,1.       ! FKN
rmod,tid,5,0.       ! ICONT
rmod,tid,6,0.       ! PINB
rmod,tid,10,0.      ! CNOF
rmod,tid,12,0.      ! FKT
rmod,tid,36,235     ! WB DSID
rmod,cid,3,1.       ! FKN
rmod,cid,5,0.       ! ICONT
rmod,cid,6,0.       ! PINB
rmod,cid,10,0.      ! CNOF
rmod,cid,12,0.      ! FKT
rmod,cid,36,235     ! WB DSID
/com,*********** Create Contact "Frictional - Component12\Solid To Component2\Solid1 2" ***********
*set,tid,26
*set,cid,25
r,tid
r,cid
et,tid,170
et,cid,174
MAT,25 $ TYPE,25 $ REAL,25 $ SECNUM,25 $ ESYS,0    ! ELEMNODES = 8
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MAT,26 $ TYPE,26 $ REAL,25 $ SECNUM,26 $ ESYS,0    ! ELEMNODES = 8
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keyo,cid,10,0              ! adjust contact stiffness each NR iteration (from Program Controlled setting)
keyo,cid,12,0              ! standard contact
mp,mu,cid,0.2       ! unitless
keyo,cid,2,0               ! augmented Lagrange (from Program Controlled setting)
keyo,cid,4,0               ! on Gauss point (from Program Controlled setting)
keyo,cid,9,0               ! use real geometry with stepped effects
keyo,cid,7,0               ! No Prediction
rmod,cid,3,1.       ! FKN
rmod,cid,5,0.       ! ICONT
rmod,cid,6,0.       ! PINB
rmod,cid,10,0.      ! CNOF
rmod,cid,12,0.      ! FKT
rmod,cid,36,242     ! WB DSID
/com,*********** Create Contact "Frictional - Component12\Solid To Component2\Solid1 3" ***********
*set,tid,28
*set,cid,27
r,tid
r,cid
et,tid,170
et,cid,174
MAT,27 $ TYPE,27 $ REAL,27 $ SECNUM,27 $ ESYS,0    ! ELEMNODES = 8
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MAT,28 $ TYPE,28 $ REAL,27 $ SECNUM,28 $ ESYS,0    ! ELEMNODES = 8
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keyo,cid,10,0              ! adjust contact stiffness each NR iteration (from Program Controlled setting)
keyo,cid,12,0              ! standard contact
mp,mu,cid,0.2       ! unitless
keyo,cid,2,0               ! augmented Lagrange (from Program Controlled setting)
keyo,cid,4,0               ! on Gauss point (from Program Controlled setting)
keyo,cid,9,0               ! use real geometry with stepped effects
keyo,cid,7,0               ! No Prediction
rmod,cid,3,1.       ! FKN
rmod,cid,5,0.       ! ICONT
rmod,cid,6,0.       ! PINB
rmod,cid,10,0.      ! CNOF
rmod,cid,12,0.      ! FKT
rmod,cid,36,245     ! WB DSID
/com,*********** Create Contact "Frictional - Component12\Solid To Component2\Solid1 4" ***********
*set,tid,30
*set,cid,29
r,tid
r,cid
et,tid,170
et,cid,174
MAT,29 $ TYPE,29 $ REAL,29 $ SECNUM,29 $ ESYS,0    ! ELEMNODES = 8
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MAT,30 $ TYPE,30 $ REAL,29 $ SECNUM,30 $ ESYS,0    ! ELEMNODES = 8
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keyo,cid,10,0              ! adjust contact stiffness each NR iteration (from Program Controlled setting)
keyo,cid,12,0              ! standard contact
mp,mu,cid,0.2       ! unitless
keyo,cid,2,0               ! augmented Lagrange (from Program Controlled setting)
keyo,cid,4,0               ! on Gauss point (from Program Controlled setting)
keyo,cid,9,0               ! use real geometry with stepped effects
keyo,cid,7,0               ! No Prediction
rmod,cid,3,1.       ! FKN
rmod,cid,5,0.       ! ICONT
rmod,cid,6,0.       ! PINB
rmod,cid,10,0.      ! CNOF
rmod,cid,12,0.      ! FKT
rmod,cid,36,248     ! WB DSID
/com,*********** Create Contact "Frictional - Component12\Solid To Component2\Solid1 5" ***********
*set,tid,32
*set,cid,31
r,tid
r,cid
et,tid,170
et,cid,174
MAT,31 $ TYPE,31 $ REAL,31 $ SECNUM,31 $ ESYS,0    ! ELEMNODES = 8
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MAT,32 $ TYPE,32 $ REAL,31 $ SECNUM,32 $ ESYS,0    ! ELEMNODES = 8
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keyo,cid,10,0              ! adjust contact stiffness each NR iteration (from Program Controlled setting)
keyo,cid,12,0              ! standard contact
mp,mu,cid,0.2       ! unitless
keyo,cid,2,0               ! augmented Lagrange (from Program Controlled setting)
keyo,cid,4,0               ! on Gauss point (from Program Controlled setting)
keyo,cid,9,0               ! use real geometry with stepped effects
keyo,cid,7,0               ! No Prediction
rmod,cid,3,1.       ! FKN
rmod,cid,5,0.       ! ICONT
rmod,cid,6,0.       ! PINB
rmod,cid,10,0.      ! CNOF
rmod,cid,12,0.      ! FKT
rmod,cid,36,251     ! WB DSID
/com,*********** Create Contact "Frictional - Component12\Solid To Component2\Solid1 6" ***********
*set,tid,34
*set,cid,33
r,tid
r,cid
et,tid,170
et,cid,174
MAT,33 $ TYPE,33 $ REAL,33 $ SECNUM,33 $ ESYS,0    ! ELEMNODES = 8
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MAT,34 $ TYPE,34 $ REAL,33 $ SECNUM,34 $ ESYS,0    ! ELEMNODES = 8
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keyo,cid,10,0              ! adjust contact stiffness each NR iteration (from Program Controlled setting)
keyo,cid,12,0              ! standard contact
mp,mu,cid,0.2       ! unitless
keyo,cid,2,0               ! augmented Lagrange (from Program Controlled setting)
keyo,cid,4,0               ! on Gauss point (from Program Controlled setting)
keyo,cid,9,0               ! use real geometry with stepped effects
keyo,cid,7,0               ! No Prediction
rmod,cid,3,1.       ! FKN
rmod,cid,5,0.       ! ICONT
rmod,cid,6,0.       ! PINB
rmod,cid,10,0.      ! CNOF
rmod,cid,12,0.      ! FKT
rmod,cid,36,254     ! WB DSID
/com,*********** Create Contact "Frictional - Component12\Solid To Component2\Solid1 7" ***********
*set,tid,36
*set,cid,35
r,tid
r,cid
et,tid,170
et,cid,174
MAT,35 $ TYPE,35 $ REAL,35 $ SECNUM,35 $ ESYS,0    ! ELEMNODES = 8
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MAT,36 $ TYPE,36 $ REAL,35 $ SECNUM,36 $ ESYS,0    ! ELEMNODES = 8
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keyo,cid,10,0              ! adjust contact stiffness each NR iteration (from Program Controlled setting)
keyo,cid,12,0              ! standard contact
mp,mu,cid,0.2       ! unitless
keyo,cid,2,0               ! augmented Lagrange (from Program Controlled setting)
keyo,cid,4,0               ! on Gauss point (from Program Controlled setting)
keyo,cid,9,0               ! use real geometry with stepped effects
keyo,cid,7,0               ! No Prediction
rmod,cid,3,1.       ! FKN
rmod,cid,5,0.       ! ICONT
rmod,cid,6,0.       ! PINB
rmod,cid,10,0.      ! CNOF
rmod,cid,12,0.      ! FKT
rmod,cid,36,257     ! WB DSID
/com,*********** Create Contact "Frictional - Component12\Solid To Component2\Solid1 8" ***********
*set,tid,38
*set,cid,37
r,tid
r,cid
et,tid,170
et,cid,174
MAT,37 $ TYPE,37 $ REAL,37 $ SECNUM,37 $ ESYS,0    ! ELEMNODES = 8
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MAT,38 $ TYPE,38 $ REAL,37 $ SECNUM,38 $ ESYS,0    ! ELEMNODES = 8
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keyo,cid,10,0              ! adjust contact stiffness each NR iteration (from Program Controlled setting)
keyo,cid,12,0              ! standard contact
mp,mu,cid,0.2       ! unitless
keyo,cid,2,0               ! augmented Lagrange (from Program Controlled setting)
keyo,cid,4,0               ! on Gauss point (from Program Controlled setting)
keyo,cid,9,0               ! use real geometry with stepped effects
keyo,cid,7,0               ! No Prediction
rmod,cid,3,1.       ! FKN
rmod,cid,5,0.       ! ICONT
rmod,cid,6,0.       ! PINB
rmod,cid,10,0.      ! CNOF
rmod,cid,12,0.      ! FKT
rmod,cid,36,260     ! WB DSID
/com,*********** Create Contact "Frictional - Component12\Solid To Component2\Solid1 9" ***********
*set,tid,40
*set,cid,39
r,tid
r,cid
et,tid,170
et,cid,174
MAT,39 $ TYPE,39 $ REAL,39 $ SECNUM,39 $ ESYS,0    ! ELEMNODES = 8
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MAT,40 $ TYPE,40 $ REAL,39 $ SECNUM,40 $ ESYS,0    ! ELEMNODES = 8
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keyo,cid,10,0              ! adjust contact stiffness each NR iteration (from Program Controlled setting)
keyo,cid,12,0              ! standard contact
mp,mu,cid,0.2       ! unitless
keyo,cid,2,0               ! augmented Lagrange (from Program Controlled setting)
keyo,cid,4,0               ! on Gauss point (from Program Controlled setting)
keyo,cid,9,0               ! use real geometry with stepped effects
keyo,cid,7,0               ! No Prediction
rmod,cid,3,1.       ! FKN
rmod,cid,5,0.       ! ICONT
rmod,cid,6,0.       ! PINB
rmod,cid,10,0.      ! CNOF
rmod,cid,12,0.      ! FKT
rmod,cid,36,263     ! WB DSID
/com,*********** Create Contact "Frictional - Component11\Solid To Component1\Solid11 2" ***********
*set,tid,42
*set,cid,41
r,tid
r,cid
et,tid,170
et,cid,174
MAT,41 $ TYPE,41 $ REAL,41 $ SECNUM,41 $ ESYS,0    ! ELEMNODES = 8
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MAT,42 $ TYPE,42 $ REAL,41 $ SECNUM,42 $ ESYS,0    ! ELEMNODES = 8
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keyo,cid,10,0              ! adjust contact stiffness each NR iteration (from Program Controlled setting)
keyo,cid,12,0              ! standard contact
mp,mu,cid,0.2       ! unitless
keyo,cid,2,0               ! augmented Lagrange (from Program Controlled setting)
keyo,cid,4,0               ! on Gauss point (from Program Controlled setting)
keyo,cid,9,0               ! use real geometry with stepped effects
keyo,cid,7,0               ! No Prediction
rmod,cid,3,1.       ! FKN
rmod,cid,5,0.       ! ICONT
rmod,cid,6,0.       ! PINB
rmod,cid,10,0.      ! CNOF
rmod,cid,12,0.      ! FKT
rmod,cid,36,270     ! WB DSID
/com,*********** Create Contact "Frictional - Component11\Solid To Component1\Solid11 3" ***********
*set,tid,44
*set,cid,43
r,tid
r,cid
et,tid,170
et,cid,174
MAT,43 $ TYPE,43 $ REAL,43 $ SECNUM,43 $ ESYS,0    ! ELEMNODES = 8
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MAT,44 $ TYPE,44 $ REAL,43 $ SECNUM,44 $ ESYS,0    ! ELEMNODES = 8
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keyo,cid,10,0              ! adjust contact stiffness each NR iteration (from Program Controlled setting)
keyo,cid,12,0              ! standard contact
mp,mu,cid,0.2       ! unitless
keyo,cid,2,0               ! augmented Lagrange (from Program Controlled setting)
keyo,cid,4,0               ! on Gauss point (from Program Controlled setting)
keyo,cid,9,0               ! use real geometry with stepped effects
keyo,cid,7,0               ! No Prediction
rmod,cid,3,1.       ! FKN
rmod,cid,5,0.       ! ICONT
rmod,cid,6,0.       ! PINB
rmod,cid,10,0.      ! CNOF
rmod,cid,12,0.      ! FKT
rmod,cid,36,273     ! WB DSID
/com,*********** Create Contact "Frictional - Component11\Solid To Component1\Solid11 4" ***********
*set,tid,46
*set,cid,45
r,tid
r,cid
et,tid,170
et,cid,174
MAT,45 $ TYPE,45 $ REAL,45 $ SECNUM,45 $ ESYS,0    ! ELEMNODES = 8
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MAT,46 $ TYPE,46 $ REAL,45 $ SECNUM,46 $ ESYS,0    ! ELEMNODES = 8
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keyo,cid,10,0              ! adjust contact stiffness each NR iteration (from Program Controlled setting)
keyo,cid,12,0              ! standard contact
mp,mu,cid,0.2       ! unitless
keyo,cid,2,0               ! augmented Lagrange (from Program Controlled setting)
keyo,cid,4,0               ! on Gauss point (from Program Controlled setting)
keyo,cid,9,0               ! use real geometry with stepped effects
keyo,cid,7,0               ! No Prediction
rmod,cid,3,1.       ! FKN
rmod,cid,5,0.       ! ICONT
rmod,cid,6,0.       ! PINB
rmod,cid,10,0.      ! CNOF
rmod,cid,12,0.      ! FKT
rmod,cid,36,276     ! WB DSID
/com,*********** Create Contact "Frictional - Component11\Solid To Component1\Solid11 5" ***********
*set,tid,48
*set,cid,47
r,tid
r,cid
et,tid,170
et,cid,174
MAT,47 $ TYPE,47 $ REAL,47 $ SECNUM,47 $ ESYS,0    ! ELEMNODES = 8
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MAT,48 $ TYPE,48 $ REAL,47 $ SECNUM,48 $ ESYS,0    ! ELEMNODES = 8
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keyo,cid,10,0              ! adjust contact stiffness each NR iteration (from Program Controlled setting)
keyo,cid,12,0              ! standard contact
mp,mu,cid,0.2       ! unitless
keyo,cid,2,0               ! augmented Lagrange (from Program Controlled setting)
keyo,cid,4,0               ! on Gauss point (from Program Controlled setting)
keyo,cid,9,0               ! use real geometry with stepped effects
keyo,cid,7,0               ! No Prediction
rmod,cid,3,1.       ! FKN
rmod,cid,5,0.       ! ICONT
rmod,cid,6,0.       ! PINB
rmod,cid,10,0.      ! CNOF
rmod,cid,12,0.      ! FKT
rmod,cid,36,279     ! WB DSID
/com,*********** Create Contact "Frictional - Component11\Solid To Component1\Solid11 6" ***********
*set,tid,50
*set,cid,49
r,tid
r,cid
et,tid,170
et,cid,174
MAT,49 $ TYPE,49 $ REAL,49 $ SECNUM,49 $ ESYS,0    ! ELEMNODES = 8
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MAT,50 $ TYPE,50 $ REAL,49 $ SECNUM,50 $ ESYS,0    ! ELEMNODES = 8
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keyo,cid,10,0              ! adjust contact stiffness each NR iteration (from Program Controlled setting)
keyo,cid,12,0              ! standard contact
mp,mu,cid,0.2       ! unitless
keyo,cid,2,0               ! augmented Lagrange (from Program Controlled setting)
keyo,cid,4,0               ! on Gauss point (from Program Controlled setting)
keyo,cid,9,0               ! use real geometry with stepped effects
keyo,cid,7,0               ! No Prediction
rmod,cid,3,1.       ! FKN
rmod,cid,5,0.       ! ICONT
rmod,cid,6,0.       ! PINB
rmod,cid,10,0.      ! CNOF
rmod,cid,12,0.      ! FKT
rmod,cid,36,282     ! WB DSID
/com,*********** Create Contact "Frictional - Component11\Solid To Component1\Solid11 7" ***********
*set,tid,52
*set,cid,51
r,tid
r,cid
et,tid,170
et,cid,174
MAT,51 $ TYPE,51 $ REAL,51 $ SECNUM,51 $ ESYS,0    ! ELEMNODES = 8
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MAT,52 $ TYPE,52 $ REAL,51 $ SECNUM,52 $ ESYS,0    ! ELEMNODES = 8
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keyo,cid,10,0              ! adjust contact stiffness each NR iteration (from Program Controlled setting)
keyo,cid,12,0              ! standard contact
mp,mu,cid,0.2       ! unitless
keyo,cid,2,0               ! augmented Lagrange (from Program Controlled setting)
keyo,cid,4,0               ! on Gauss point (from Program Controlled setting)
keyo,cid,9,0               ! use real geometry with stepped effects
keyo,cid,7,0               ! No Prediction
rmod,cid,3,1.       ! FKN
rmod,cid,5,0.       ! ICONT
rmod,cid,6,0.       ! PINB
rmod,cid,10,0.      ! CNOF
rmod,cid,12,0.      ! FKT
rmod,cid,36,285     ! WB DSID
/com,*********** Create Contact "Frictional - Component11\Solid To Component1\Solid11 8" ***********
*set,tid,54
*set,cid,53
r,tid
r,cid
et,tid,170
et,cid,174
MAT,53 $ TYPE,53 $ REAL,53 $ SECNUM,53 $ ESYS,0    ! ELEMNODES = 8
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MAT,54 $ TYPE,54 $ REAL,53 $ SECNUM,54 $ ESYS,0    ! ELEMNODES = 8
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keyo,cid,10,0              ! adjust contact stiffness each NR iteration (from Program Controlled setting)
keyo,cid,12,0              ! standard contact
mp,mu,cid,0.2       ! unitless
keyo,cid,2,0               ! augmented Lagrange (from Program Controlled setting)
keyo,cid,4,0               ! on Gauss point (from Program Controlled setting)
keyo,cid,9,0               ! use real geometry with stepped effects
keyo,cid,7,0               ! No Prediction
rmod,cid,3,1.       ! FKN
rmod,cid,5,0.       ! ICONT
rmod,cid,6,0.       ! PINB
rmod,cid,10,0.      ! CNOF
rmod,cid,12,0.      ! FKT
rmod,cid,36,288     ! WB DSID
/com,*********** Create Contact "Frictional - Component11\Solid To Component1\Solid11 9" ***********
*set,tid,56
*set,cid,55
r,tid
r,cid
et,tid,170
et,cid,174
MAT,55 $ TYPE,55 $ REAL,55 $ SECNUM,55 $ ESYS,0    ! ELEMNODES = 8
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MAT,56 $ TYPE,56 $ REAL,55 $ SECNUM,56 $ ESYS,0    ! ELEMNODES = 8
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keyo,cid,10,0              ! adjust contact stiffness each NR iteration (from Program Controlled setting)
keyo,cid,12,0              ! standard contact
mp,mu,cid,0.2       ! unitless
keyo,cid,2,0               ! augmented Lagrange (from Program Controlled setting)
keyo,cid,4,0               ! on Gauss point (from Program Controlled setting)
keyo,cid,9,0               ! use real geometry with stepped effects
keyo,cid,7,0               ! No Prediction
rmod,cid,3,1.       ! FKN
rmod,cid,5,0.       ! ICONT
rmod,cid,6,0.       ! PINB
rmod,cid,10,0.      ! CNOF
rmod,cid,12,0.      ! FKT
rmod,cid,36,291     ! WB DSID
/com,*********** Create Contact "Bonded - Component11\Solid To Component12\Solid" ***********
*set,tid,58
*set,cid,57
r,tid
r,cid
et,tid,170
et,cid,174
MAT,57 $ TYPE,57 $ REAL,57 $ SECNUM,57 $ ESYS,0    ! ELEMNODES = 8
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MAT,58 $ TYPE,58 $ REAL,57 $ SECNUM,58 $ ESYS,0    ! ELEMNODES = 8
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keyo,cid,10,0              ! adjust contact stiffness each NR iteration (from Program Controlled setting)
keyo,cid,12,5              ! bonded always
keyo,cid,18,1              ! small sliding turned on by application
keyo,cid,2,2               ! MPC for bonded contacts (from Program Controlled setting)
keyo,tid,5,0               ! Automatic constraint type detection
keyo,cid,4,2               ! on nodal point - normal to target surface (from Program Controlled setting)
keyo,cid,9,1               ! ignore initial gaps/penetration
keyo,cid,7,0               ! No Prediction
rmod,cid,3,1.       ! FKN
rmod,cid,5,0.       ! ICONT
rmod,cid,6,0.       ! PINB
rmod,cid,10,0.      ! CNOF
rmod,cid,12,0.      ! FKT
rmod,cid,36,295     ! WB DSID
/com,*********** Create Contact "Bonded - Component11\Solid To Component12\Solid 2" ***********
*set,tid,60
*set,cid,59
r,tid
r,cid
et,tid,170
et,cid,174
MAT,59 $ TYPE,59 $ REAL,59 $ SECNUM,59 $ ESYS,0    ! ELEMNODES = 8
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MAT,60 $ TYPE,60 $ REAL,59 $ SECNUM,60 $ ESYS,0    ! ELEMNODES = 8
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keyo,cid,10,0              ! adjust contact stiffness each NR iteration (from Program Controlled setting)
keyo,cid,12,5              ! bonded always
keyo,cid,18,1              ! small sliding turned on by application
keyo,cid,2,2               ! MPC for bonded contacts (from Program Controlled setting)
keyo,tid,5,0               ! Automatic constraint type detection
keyo,cid,4,2               ! on nodal point - normal to target surface (from Program Controlled setting)
keyo,cid,9,1               ! ignore initial gaps/penetration
keyo,cid,7,0               ! No Prediction
rmod,cid,3,1.       ! FKN
rmod,cid,5,0.       ! ICONT
rmod,cid,6,0.       ! PINB
rmod,cid,10,0.      ! CNOF
rmod,cid,12,0.      ! FKT
rmod,cid,36,298     ! WB DSID
/com,*********** Create Contact "Bonded - Component11\Solid To Component12\Solid 3" ***********
*set,tid,62
*set,cid,61
r,tid
r,cid
et,tid,170
et,cid,174
MAT,61 $ TYPE,61 $ REAL,61 $ SECNUM,61 $ ESYS,0    ! ELEMNODES = 8
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MAT,62 $ TYPE,62 $ REAL,61 $ SECNUM,62 $ ESYS,0    ! ELEMNODES = 8
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keyo,cid,10,0              ! adjust contact stiffness each NR iteration (from Program Controlled setting)
keyo,cid,12,5              ! bonded always
keyo,cid,18,1              ! small sliding turned on by application
keyo,cid,2,2               ! MPC for bonded contacts (from Program Controlled setting)
keyo,tid,5,0               ! Automatic constraint type detection
keyo,cid,4,2               ! on nodal point - normal to target surface (from Program Controlled setting)
keyo,cid,9,1               ! ignore initial gaps/penetration
keyo,cid,7,0               ! No Prediction
rmod,cid,3,1.       ! FKN
rmod,cid,5,0.       ! ICONT
rmod,cid,6,0.       ! PINB
rmod,cid,10,0.      ! CNOF
rmod,cid,12,0.      ! FKT
rmod,cid,36,301     ! WB DSID
/com,*********** Create Contact "Bonded - Component11\Solid To Component12\Solid 4" ***********
*set,tid,64
*set,cid,63
r,tid
r,cid
et,tid,170
et,cid,174
MAT,63 $ TYPE,63 $ REAL,63 $ SECNUM,63 $ ESYS,0    ! ELEMNODES = 8
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MAT,64 $ TYPE,64 $ REAL,63 $ SECNUM,64 $ ESYS,0    ! ELEMNODES = 8
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keyo,cid,10,0              ! adjust contact stiffness each NR iteration (from Program Controlled setting)
keyo,cid,12,5              ! bonded always
keyo,cid,18,1              ! small sliding turned on by application
keyo,cid,2,2               ! MPC for bonded contacts (from Program Controlled setting)
keyo,tid,5,0               ! Automatic constraint type detection
keyo,cid,4,2               ! on nodal point - normal to target surface (from Program Controlled setting)
keyo,cid,9,1               ! ignore initial gaps/penetration
keyo,cid,7,0               ! No Prediction
rmod,cid,3,1.       ! FKN
rmod,cid,5,0.       ! ICONT
rmod,cid,6,0.       ! PINB
rmod,cid,10,0.      ! CNOF
rmod,cid,12,0.      ! FKT
rmod,cid,36,304     ! WB DSID
/com,*********** Create Contact "Bonded - Component11\Solid To Component12\Solid 5" ***********
*set,tid,66
*set,cid,65
r,tid
r,cid
et,tid,170
et,cid,174
MAT,65 $ TYPE,65 $ REAL,65 $ SECNUM,65 $ ESYS,0    ! ELEMNODES = 8
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MAT,66 $ TYPE,66 $ REAL,65 $ SECNUM,66 $ ESYS,0    ! ELEMNODES = 8
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keyo,cid,10,0              ! adjust contact stiffness each NR iteration (from Program Controlled setting)
keyo,cid,12,5              ! bonded always
keyo,cid,18,1              ! small sliding turned on by application
keyo,cid,2,2               ! MPC for bonded contacts (from Program Controlled setting)
keyo,tid,5,0               ! Automatic constraint type detection
keyo,cid,4,2               ! on nodal point - normal to target surface (from Program Controlled setting)
keyo,cid,9,1               ! ignore initial gaps/penetration
keyo,cid,7,0               ! No Prediction
rmod,cid,3,1.       ! FKN
rmod,cid,5,0.       ! ICONT
rmod,cid,6,0.       ! PINB
rmod,cid,10,0.      ! CNOF
rmod,cid,12,0.      ! FKT
rmod,cid,36,307     ! WB DSID
/com,*********** Create Contact "Bonded - Component11\Solid To Component12\Solid 6" ***********
*set,tid,68
*set,cid,67
r,tid
r,cid
et,tid,170
et,cid,174
MAT,67 $ TYPE,67 $ REAL,67 $ SECNUM,67 $ ESYS,0    ! ELEMNODES = 8
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MAT,68 $ TYPE,68 $ REAL,67 $ SECNUM,68 $ ESYS,0    ! ELEMNODES = 8
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keyo,cid,10,0              ! adjust contact stiffness each NR iteration (from Program Controlled setting)
keyo,cid,12,5              ! bonded always
keyo,cid,18,1              ! small sliding turned on by application
keyo,cid,2,2               ! MPC for bonded contacts (from Program Controlled setting)
keyo,tid,5,0               ! Automatic constraint type detection
keyo,cid,4,2               ! on nodal point - normal to target surface (from Program Controlled setting)
keyo,cid,9,1               ! ignore initial gaps/penetration
keyo,cid,7,0               ! No Prediction
rmod,cid,3,1.       ! FKN
rmod,cid,5,0.       ! ICONT
rmod,cid,6,0.       ! PINB
rmod,cid,10,0.      ! CNOF
rmod,cid,12,0.      ! FKT
rmod,cid,36,310     ! WB DSID
/com,*********** Create Contact "Bonded - Component11\Solid To Component12\Solid 7" ***********
*set,tid,70
*set,cid,69
r,tid
r,cid
et,tid,170
et,cid,174
MAT,69 $ TYPE,69 $ REAL,69 $ SECNUM,69 $ ESYS,0    ! ELEMNODES = 8
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MAT,70 $ TYPE,70 $ REAL,69 $ SECNUM,70 $ ESYS,0    ! ELEMNODES = 8
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keyo,cid,10,0              ! adjust contact stiffness each NR iteration (from Program Controlled setting)
keyo,cid,12,5              ! bonded always
keyo,cid,18,1              ! small sliding turned on by application
keyo,cid,2,2               ! MPC for bonded contacts (from Program Controlled setting)
keyo,tid,5,0               ! Automatic constraint type detection
keyo,cid,4,2               ! on nodal point - normal to target surface (from Program Controlled setting)
keyo,cid,9,1               ! ignore initial gaps/penetration
keyo,cid,7,0               ! No Prediction
rmod,cid,3,1.       ! FKN
rmod,cid,5,0.       ! ICONT
rmod,cid,6,0.       ! PINB
rmod,cid,10,0.      ! CNOF
rmod,cid,12,0.      ! FKT
rmod,cid,36,313     ! WB DSID
/com,*********** Create Contact "Bonded - Component11\Solid To Component12\Solid 8" ***********
*set,tid,72
*set,cid,71
r,tid
r,cid
et,tid,170
et,cid,174
MAT,71 $ TYPE,71 $ REAL,71 $ SECNUM,71 $ ESYS,0    ! ELEMNODES = 8
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MAT,72 $ TYPE,72 $ REAL,71 $ SECNUM,72 $ ESYS,0    ! ELEMNODES = 8
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keyo,cid,10,0              ! adjust contact stiffness each NR iteration (from Program Controlled setting)
keyo,cid,12,5              ! bonded always
keyo,cid,18,1              ! small sliding turned on by application
keyo,cid,2,2               ! MPC for bonded contacts (from Program Controlled setting)
keyo,tid,5,0               ! Automatic constraint type detection
keyo,cid,4,2               ! on nodal point - normal to target surface (from Program Controlled setting)
keyo,cid,9,1               ! ignore initial gaps/penetration
keyo,cid,7,0               ! No Prediction
rmod,cid,3,1.       ! FKN
rmod,cid,5,0.       ! ICONT
rmod,cid,6,0.       ! PINB
rmod,cid,10,0.      ! CNOF
rmod,cid,12,0.      ! FKT
rmod,cid,36,316     ! WB DSID
nsel,all
esel,all
/com,*********** Send Named Selection as Element Component ***********
esel,s,type,,13
esel,a,type,,14,20
cm,BOLTS,elem
esel,all
/com,*********** Send Named Selection as Node Component ***********
CMBLOCK,BOLT_HEAD_SPACING,NODE,      160
(8i10)
     84157    -84172     84585    -84632     86011     86014     86016     86018
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/com,*********** Send Named Selection as Node Component ***********
CMBLOCK,BOLT_SHANK,NODE,     2552
(8i10)
     84157    -84172     84195    -84210     84233    -84248     84271    -84286
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/com,*********** Send Named Selection as Element Component ***********
esel,s,type,,5
esel,a,type,,6,12
cm,NUTS,elem
esel,all
/com,*********** Send Named Selection as Node Component ***********
CMBLOCK,NUT_SPACING,NODE,      299
(8i10)
     82139    -82162     82211    -82213     82215     82216     82218     82219
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/com,*********** Send Named Selection as Node Component ***********
CMBLOCK,NUT_GRIP,NODE,      200
(8i10)
     82155    -82178     82259    -82277     82279     82280     82284     82285
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/com,*********** Send Named Selection as Node Component ***********
CMBLOCK,TOP_FACE,NODE,       68
(8i10)
     47606    -49587     51789     51791    -51797     51805     51807    -51813
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/com,*********** Send Named Selection as Node Component ***********
CMBLOCK,BOT_FACE,NODE,      316
(8i10)
      3317     -4465     27778    -28763     28765    -29633     29635     29636
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/com,*********** Fixed Supports ***********
CMBLOCK,_FIXEDSU,NODE,      102
(8i10)
     10187    -10962     43475    -44876     44878     44879     44881     44882
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cmsel,s,_FIXEDSU
d,all,all
nsel,all
/com,*********** Define Force Using Surface Effect Elements ***********
local,14,0,0.,0.,0.,0.,0.,0.
csys,0
et,73,154
MAT,73 $ TYPE,73 $ REAL,73 $ SECNUM,73 $ ESYS,14    ! ELEMNODES = 8
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esel,s,type,,73
keyop,73,2,1        ! Apply load in local coordinate system
keyop,73,7,1        ! Use original area so load is constant in large deformation
esel,all

*DIM,_loadvari326z,TABLE,3,1,1,TIME, , , 0
! Time values
*TAXIS,_loadvari326z(1),1,0.,1.,2.
! Load values
_loadvari326z(1,1,1) = 0.
_loadvari326z(2,1,1) = 0.
_loadvari326z(3,1,1) = -0.228173402893111


/com,*********** Create Bolt Pretension "Bolt Pretension" ***********
*set,_pretnode,99931
_nbolt331 = 99931               ! that will be the pretension node number
local,11,1,-3.02295961503818e-015,0.,-2.,90.,0.,0.
nmod,99931,0,0,0,,,,1         ! move pretension node to bolt center, don't update centroid
*set,_tid,74
et,_tid,179
type,_tid
real,_tid
mat,_tid
secnum,_tid
esel,s,type,,19
*set,_wbpstol,6.96419381743917e-003
*get,_echck1,elem,,num,max    ! make sure psmesh command was successful
psmesh,_tid,,99931,all,,11,z,0.0,,_wbpstol,_tid,cmebolt,cmnbolt
*get,_echck2,elem,,num,max    ! make sure psmesh command was successful
*if,_echck1,eq,_echck2,then
  *msg,error
  THE PRETENSION LOAD WAS NOT ABLE TO BE APPLIED. &
  MAKE SURE THE LOAD WAS NOT APPLIED TO A HOLE AND THAT &
  THE LOAD IS NOT APPLIED MORE THAN ONCE PER SURFACE
*endif
esel,all
nsel,all
csys,0
/com,*********** Create Bolt Pretension "Bolt Pretension 2" ***********
*set,_pretnode,99932
_nbolt333 = 99932               ! that will be the pretension node number
local,11,1,-3.02295961503818e-015,0.,-2.,90.,0.,0.
nmod,99932,0,0,0,,,,1         ! move pretension node to bolt center, don't update centroid
*set,_tid,75
et,_tid,179
type,_tid
real,_tid
mat,_tid
secnum,_tid
esel,s,type,,13
*set,_wbpstol,6.96419381743917e-003
*get,_echck1,elem,,num,max    ! make sure psmesh command was successful
psmesh,_tid,,99932,all,,11,z,0.0,,_wbpstol,_tid,cmebolt,cmnbolt
*get,_echck2,elem,,num,max    ! make sure psmesh command was successful
*if,_echck1,eq,_echck2,then
  *msg,error
  THE PRETENSION LOAD WAS NOT ABLE TO BE APPLIED. &
  MAKE SURE THE LOAD WAS NOT APPLIED TO A HOLE AND THAT &
  THE LOAD IS NOT APPLIED MORE THAN ONCE PER SURFACE
*endif
esel,all
nsel,all
csys,0
/com,*********** Create Bolt Pretension "Bolt Pretension 3" ***********
*set,_pretnode,99933
_nbolt335 = 99933               ! that will be the pretension node number
local,11,1,-3.02295961503818e-015,0.,-2.,90.,0.,0.
nmod,99933,0,0,0,,,,1         ! move pretension node to bolt center, don't update centroid
*set,_tid,76
et,_tid,179
type,_tid
real,_tid
mat,_tid
secnum,_tid
esel,s,type,,14
*set,_wbpstol,6.96419410997383e-003
*get,_echck1,elem,,num,max    ! make sure psmesh command was successful
psmesh,_tid,,99933,all,,11,z,0.0,,_wbpstol,_tid,cmebolt,cmnbolt
*get,_echck2,elem,,num,max    ! make sure psmesh command was successful
*if,_echck1,eq,_echck2,then
  *msg,error
  THE PRETENSION LOAD WAS NOT ABLE TO BE APPLIED. &
  MAKE SURE THE LOAD WAS NOT APPLIED TO A HOLE AND THAT &
  THE LOAD IS NOT APPLIED MORE THAN ONCE PER SURFACE
*endif
esel,all
nsel,all
csys,0
/com,*********** Create Bolt Pretension "Bolt Pretension 4" ***********
*set,_pretnode,99934
_nbolt337 = 99934               ! that will be the pretension node number
local,11,1,-3.02295961503818e-015,0.,-2.,90.,0.,0.
nmod,99934,0,0,0,,,,1         ! move pretension node to bolt center, don't update centroid
*set,_tid,77
et,_tid,179
type,_tid
real,_tid
mat,_tid
secnum,_tid
esel,s,type,,15
*set,_wbpstol,6.96419381743917e-003
*get,_echck1,elem,,num,max    ! make sure psmesh command was successful
psmesh,_tid,,99934,all,,11,z,0.0,,_wbpstol,_tid,cmebolt,cmnbolt
*get,_echck2,elem,,num,max    ! make sure psmesh command was successful
*if,_echck1,eq,_echck2,then
  *msg,error
  THE PRETENSION LOAD WAS NOT ABLE TO BE APPLIED. &
  MAKE SURE THE LOAD WAS NOT APPLIED TO A HOLE AND THAT &
  THE LOAD IS NOT APPLIED MORE THAN ONCE PER SURFACE
*endif
esel,all
nsel,all
csys,0
/com,*********** Create Bolt Pretension "Bolt Pretension 5" ***********
*set,_pretnode,99935
_nbolt339 = 99935               ! that will be the pretension node number
local,11,1,-3.02295961503818e-015,0.,-2.,90.,0.,0.
nmod,99935,0,0,0,,,,1         ! move pretension node to bolt center, don't update centroid
*set,_tid,78
et,_tid,179
type,_tid
real,_tid
mat,_tid
secnum,_tid
esel,s,type,,16
*set,_wbpstol,6.96419410997383e-003
*get,_echck1,elem,,num,max    ! make sure psmesh command was successful
psmesh,_tid,,99935,all,,11,z,0.0,,_wbpstol,_tid,cmebolt,cmnbolt
*get,_echck2,elem,,num,max    ! make sure psmesh command was successful
*if,_echck1,eq,_echck2,then
  *msg,error
  THE PRETENSION LOAD WAS NOT ABLE TO BE APPLIED. &
  MAKE SURE THE LOAD WAS NOT APPLIED TO A HOLE AND THAT &
  THE LOAD IS NOT APPLIED MORE THAN ONCE PER SURFACE
*endif
esel,all
nsel,all
csys,0
/com,*********** Create Bolt Pretension "Bolt Pretension 6" ***********
*set,_pretnode,99936
_nbolt341 = 99936               ! that will be the pretension node number
local,11,1,-3.02295961503818e-015,0.,-2.,90.,0.,0.
nmod,99936,0,0,0,,,,1         ! move pretension node to bolt center, don't update centroid
*set,_tid,79
et,_tid,179
type,_tid
real,_tid
mat,_tid
secnum,_tid
esel,s,type,,17
*set,_wbpstol,6.96419381743917e-003
*get,_echck1,elem,,num,max    ! make sure psmesh command was successful
psmesh,_tid,,99936,all,,11,z,0.0,,_wbpstol,_tid,cmebolt,cmnbolt
*get,_echck2,elem,,num,max    ! make sure psmesh command was successful
*if,_echck1,eq,_echck2,then
  *msg,error
  THE PRETENSION LOAD WAS NOT ABLE TO BE APPLIED. &
  MAKE SURE THE LOAD WAS NOT APPLIED TO A HOLE AND THAT &
  THE LOAD IS NOT APPLIED MORE THAN ONCE PER SURFACE
*endif
esel,all
nsel,all
csys,0
/com,*********** Create Bolt Pretension "Bolt Pretension 7" ***********
*set,_pretnode,99937
_nbolt343 = 99937               ! that will be the pretension node number
local,11,1,-3.02295961503818e-015,0.,-2.,90.,0.,0.
nmod,99937,0,0,0,,,,1         ! move pretension node to bolt center, don't update centroid
*set,_tid,80
et,_tid,179
type,_tid
real,_tid
mat,_tid
secnum,_tid
esel,s,type,,18
*set,_wbpstol,6.96419410997383e-003
*get,_echck1,elem,,num,max    ! make sure psmesh command was successful
psmesh,_tid,,99937,all,,11,z,0.0,,_wbpstol,_tid,cmebolt,cmnbolt
*get,_echck2,elem,,num,max    ! make sure psmesh command was successful
*if,_echck1,eq,_echck2,then
  *msg,error
  THE PRETENSION LOAD WAS NOT ABLE TO BE APPLIED. &
  MAKE SURE THE LOAD WAS NOT APPLIED TO A HOLE AND THAT &
  THE LOAD IS NOT APPLIED MORE THAN ONCE PER SURFACE
*endif
esel,all
nsel,all
csys,0
/com,*********** Create Bolt Pretension "Bolt Pretension 8" ***********
*set,_pretnode,99938
_nbolt345 = 99938               ! that will be the pretension node number
local,11,1,-3.02295961503818e-015,0.,-2.,90.,0.,0.
nmod,99938,0,0,0,,,,1         ! move pretension node to bolt center, don't update centroid
*set,_tid,81
et,_tid,179
type,_tid
real,_tid
mat,_tid
secnum,_tid
esel,s,type,,20
*set,_wbpstol,6.96419410997383e-003
*get,_echck1,elem,,num,max    ! make sure psmesh command was successful
psmesh,_tid,,99938,all,,11,z,0.0,,_wbpstol,_tid,cmebolt,cmnbolt
*get,_echck2,elem,,num,max    ! make sure psmesh command was successful
*if,_echck1,eq,_echck2,then
  *msg,error
  THE PRETENSION LOAD WAS NOT ABLE TO BE APPLIED. &
  MAKE SURE THE LOAD WAS NOT APPLIED TO A HOLE AND THAT &
  THE LOAD IS NOT APPLIED MORE THAN ONCE PER SURFACE
*endif
esel,all
nsel,all
csys,0
fini
/com,****************************************************************************
/com,*************************    SOLUTION       ********************************
/com,****************************************************************************
/solu
antype,0                   ! static analysis
nlgeom,on                  ! Turn on Large Deformation Effects
_thickRatio=0.474   ! Ratio of thick parts in the model
eqsl,sparse,,,,,1
cntr,print,1               ! print out contact info and also make no initial contact an error
dmpoption,emat,no             ! Don't combine emat file for DANSYS
dmpoption,esav,no             ! Don't combine esav file for DANSYS
nldiag,cont,iter           ! print out contact info each equilibrium iteration
rescontrol,define,last,last,,dele	   ! Program Controlled
/com,****************************************************
/com,******************* SOLVE FOR LS 1 OF 2 ****************
f,99931,fx,100.
f,99932,fx,100.
f,99933,fx,100.
f,99934,fx,100.
f,99935,fx,100.
f,99936,fx,100.
f,99937,fx,100.
f,99938,fx,100.
autots,on                   ! User turned on automatic time stepping
nsub,5,100,5,OFF
time,1.
outres,erase
outres,all,none
outres,nsol,all,
outres,rsol,all
outres,eangl,all
outres,etmp,all
outres,veng,all
outres,strs,all,
outres,epel,all,
outres,eppl,all,
outres,cont,all,
! *********** WB SOLVE COMMAND ***********
! check interactive state
*get,ANSINTER_,active,,int
*if,ANSINTER_,ne,0,then
/eof
*endif
solve
/com *************** Write FE CONNECTORS *********
CEWRITE,file,ce,,INTE
/com,****************************************************
/com,*************** FINISHED SOLVE FOR LS 1 *************
/com,****************************************************
/com,******************* SOLVE FOR LS 2 OF 2 ****************
esel,s,type,,73
nsle
sfe,all,1,pres,1,0.
sfe,all,2,pres,1,0.
sfe,all,3,pres,1,%_loadvari326z%
nsel,all
esel,all
fdel,99931,all
d,99931,ux,%_FIX%
fdel,99932,all
d,99932,ux,%_FIX%
fdel,99933,all
d,99933,ux,%_FIX%
fdel,99934,all
d,99934,ux,%_FIX%
fdel,99935,all
d,99935,ux,%_FIX%
fdel,99936,all
d,99936,ux,%_FIX%
fdel,99937,all
d,99937,ux,%_FIX%
fdel,99938,all
d,99938,ux,%_FIX%
autots,on                   ! User turned on automatic time stepping
nsub,5,100,5,OFF
time,2.
outres,erase
outres,all,none
outres,nsol,all,
outres,rsol,all
outres,eangl,all
outres,etmp,all
outres,veng,all
outres,strs,all,
outres,epel,all,
outres,eppl,all,
outres,cont,all,
solve
/com,****************************************************
/com,*************** FINISHED SOLVE FOR LS 2 *************
fini
*get,_NSOLTHREADS,active,0,ntfs
*get,_NSOLPROCESSES,active,0,npfs
/post1
fini
